// COMSOL Multiphysics 5.6.0.341 model "Untitled.mph"
// Outline of the model tree

Geometry
  geom1 "Geometry 1" (3D, length unit m)
    blk1: Block | size = {2000[nm], 2000[nm], 400[nm]}
    blk2: Block | pos = {2000[nm]/2, 2000[nm]/2, 400[nm]/2}; base = center; size = {400[nm], 400[nm], 400[nm]}
    fin: Finalize "Form Union"

Materials
  mat1: Common "Material 1" on domains 1, 2
    RefractiveIndex
      n = 1
      ki = 0
  mat2: Common "Material 2" (disabled) on domains 2
    RefractiveIndex
      n = 2
      ki = 0

Physics
  ewfd: ElectromagneticWavesFrequencyDomain on all domains
    dependent variable E = {Ex, Ey, Ez}
    BackgroundField.SolveFor = scatteredField
    BackgroundField.Eb = {1, 0, 0}
    wee1: WaveEquationElectric (default)
    pec1: PerfectElectricConductor (default)
    init1: init "Initial Values 1" (default)

Mesh
  mesh1 "Mesh 1" (physics-controlled)

Studies
  std1 "Study 1"
    freq: Frequency "Frequency Domain" | punit = THz; plist = c_const/1[um]

Solver configurations
  sol1 "Solution 1" (study std1)
    v1: Variables "Dependent Variables 1"
    s1: Stationary "Stationary Solver 1"
      p1: Parametric | pname = freq; plistarr = c_const/1[um]; punit = THz; pcontinuationmode = no
      fc1: FullyCoupled | linsolver = i1
      i1: Iterative "Suggested Iterative Solver (ewfd)" | linsolver = bicgstab
        mg1: Multigrid

Datasets
  dset1: Solution | solution = sol1
  grid1: Grid3D | source = data; data = dset1; res1 = 80; res2 = 80; res3 = 16

Plots
  pg1: PlotGroup3D "Electric Field (ewfd)" | data = dset1
    mslc1: Multislice | expr = ewfd.normE

Exports
  data1: Data
    data = dset1
    expr = {x/25[nm], y/25[nm], z/25[nm], ewfd.nxx-1}
    filename = C:\Users\yz128\Documents\DDA\Generate geometry for DDA from COMSOL\gridandmaterial.txt
    location = grid
    gridx3 = range(0[nm],25[nm],2000[nm])
    gridy3 = range(0[nm],25[nm],2000[nm])
    gridz3 = range(0[nm],25[nm],400[nm])